*Heading
** Job name: april_7 Model name: Model-1
** Generated by: Abaqus/CAE 2022
*Preprint, echo=NO, model=NO, history=NO, contact=NO
**
** PARTS
**
*Part, name=Part-1
*End Part
**
**
** ASSEMBLY
**
*Assembly, name=Assembly
**
*Instance, name=Part-1-1, part=Part-1
*Node
      1,          70.,           0.
      2,           0.,           0.
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*Element, type=DC2D3
  1,  86,  60,  35
  2,  71,  70,  49
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*Nset, nset=Set-1, generate
   1,  140,    1
*Elset, elset=Set-1, generate
   1,  230,    1
** Section: Section-1
*Solid Section, elset=Set-1, material=Concrete
,
*End Instance
**
*Nset, nset=Set-3, instance=Part-1-1
  2,  5, 35, 36, 37, 38, 39, 40, 41, 42, 43, 44, 45, 46, 47, 48
*Elset, elset=Set-3, instance=Part-1-1
  31,  33,  44,  46,  50,  69,  72,  74,  76,  78,  80,  82,  84,  86, 135
*Nset, nset=Set-4, instance=Part-1-1
  1,  3,  4,  5, 17, 18
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*Elset, elset=Set-4, instance=Part-1-1
   3,   4,  27,  29,  30,  31
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*End Assembly
**
** MATERIALS
**
*Material, name=Concrete
*Conductivity
112320.,
*Density
2690.,
*Elastic
 2.5e+10, 0.2
*Specific Heat
840.,
** ----------------------------------------------------------------
**
** STEP: Step-1
**
*Step, name=Step-1, nlgeom=NO
*Heat Transfer, end=PERIOD
1., 10., , ,
**
** BOUNDARY CONDITIONS
**
** Name: T_left Type: Temperature
*Boundary
Set-3, 11, 11, 5.
** Name: T_right_top Type: Temperature
*Boundary
Set-4, 11, 11, 10.
**
** OUTPUT REQUESTS
**
*Restart, write, frequency=0
**
** FIELD OUTPUT: F-Output-1
**
*Output, field
*Node Output
NT,
*Element Output, directions=YES
TEMP,
*Output, history, frequency=0
*End Step
