*Heading
** Job name: hyjk Model name: Model-1
** Generated by: Abaqus/CAE 2022
*Preprint, echo=NO, model=NO, history=NO, contact=NO
**
** PARTS
**
*Part, name=Part-1
*End Part
**
**
** ASSEMBLY
**
*Assembly, name=Assembly
**
*Instance, name=Part-1-1, part=Part-1
*Node
      1,          95.,           0.
      2,           0.,           0.
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*Element, type=DC2D3
 1, 42, 34, 41
 2,  4,  1, 18
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*Nset, nset=Set-1, generate
  1,  42,   1
*Elset, elset=Set-1, generate
  1,  58,   1
** Section: Section-1
*Solid Section, elset=Set-1, material=gold
,
*End Instance
**
*Nset, nset=Set-3, instance=Part-1-1
  2,  3, 19, 20, 21, 22, 23, 24
*Elset, elset=Set-3, instance=Part-1-1
  8, 17, 21, 22, 45, 47, 49
*Nset, nset=Set-4, instance=Part-1-1
  1,  3, 10, 11, 12, 13, 14, 15, 16, 17, 18
*Elset, elset=Set-4, instance=Part-1-1
  2,  6,  8, 13, 14, 15, 16, 24, 29, 30
*End Assembly
**
** MATERIALS
**
*Material, name=gold
*Conductivity
320.,
*Density
19300.,
*Specific Heat
129.,
** ----------------------------------------------------------------
**
** STEP: Step-1
**
*Step, name=Step-1, nlgeom=NO, inc=100000000
*Heat Transfer, end=PERIOD, mxdem=1.
1e+06, 1e+08, , ,
**
** BOUNDARY CONDITIONS
**
** Name: BC-1 Type: Temperature
*Boundary
Set-3, 11, 11, 300.
** Name: BC-2 Type: Temperature
*Boundary
Set-4, 11, 11, 350.
**
** OUTPUT REQUESTS
**
*Restart, write, frequency=0
**
** FIELD OUTPUT: F-Output-1
**
*Output, field
*Node Output
NT,
*Element Output, directions=YES
TEMP,
*Output, history, frequency=0
*End Step
