*Heading
** Job name: 3d-10m Model name: Model-1
** Generated by: Abaqus/CAE 2022
*Preprint, echo=NO, model=NO, history=NO, contact=NO
**
** PARTS
**
*Part, name=Geom_10m
*End Part
**
**
** ASSEMBLY
**
*Assembly, name=Assembly
**
*Instance, name=Geom_10m-1, part=Geom_10m
*Node
      1,          10.,   5.79099989,           0.
      2,          10.,           0.,           0.
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*Element, type=DC3D4
   1, 353, 354, 355, 356
   2, 357, 358, 359, 360
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*Nset, nset=Set-1, generate
   1,  570,    1
*Elset, elset=Set-1, generate
    1,  2236,     1
** Section: Section-1
*Solid Section, elset=Set-1, material=Material-1
,
*End Instance
**
*Nset, nset=Set-4, instance=Geom_10m-1
   2,   3,   5,   6,  16,  17
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*Elset, elset=Set-4, instance=Geom_10m-1
  108,  119,  137,  194,  237,  242
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*Nset, nset=Set-5, instance=Geom_10m-1
   1,   4,   5,   6,   7,   8
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*Elset, elset=Set-5, instance=Geom_10m-1
  113,  118,  156,  174,  181,  305
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*End Assembly
*Amplitude, name=Amp-1
             1.,            18.7,              2.,            20.6,              3.,            18.2,              4.,            10.1
             5.,             8.8,              6.,            12.1,              7.,            15.7,              8.,             11.
             9.,            10.9,             10.,            16.6,             11.,            21.1,             12.,            14.4
            13.,             7.6,             14.,             9.3,             15.,            13.4,             16.,            19.7
            17.,            17.9,             18.,            18.9,             19.,            12.8,             20.,            10.7
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           365.,            10.9
**
** MATERIALS
**
*Material, name=Material-1
*Conductivity
112320.,
*Density
2690.,
*Specific Heat
840.,
** ----------------------------------------------------------------
**
** STEP: Step-1
**
*Step, name=Step-1, nlgeom=NO, inc=365
*Heat Transfer, steady state
1., 365., 1., 1.,
**
** BOUNDARY CONDITIONS
**
** Name: BC-1 Type: Temperature
*Boundary
Set-4, 11, 11, 5.
** Name: BC-2 Type: Temperature
*Boundary, amplitude=Amp-1
Set-5, 11, 11, 1.
**
** OUTPUT REQUESTS
**
*Restart, write, frequency=0
**
** FIELD OUTPUT: F-Output-1
**
*Output, field
*Node Output
NT,
*Element Output, directions=YES
TEMP,
*Output, history, frequency=0
*End Step
